#### LAMMPS input file for CG simulations #########################
#### LAMMPS input file for semiflexible simulations ###############
#### Version : Feb-15-2019 ########################################
#Stage4: Production ###############################################

log             log.single
units           lj
boundary        p p p
atom_style      molecular
read_restart    restart2

#--------------------Output----------------------------------------#

thermo_style    custom step time temp press
thermo          100000
neighbor        1.0 bin
neigh_modify    every 1 delay 0 check yes

#---------------Main Run begins here-------------------------------#

variable ts equal step
timestep 0.001
fix 1 all nvt temp 1.0 1.0 1.0
fix 2 all momentum 100000 linear 1 1 1
dump 1 all custom 1000 dump_stage_${ts}.lammpstrj id type xu yu zu

group backbone type 1:8
dump d0 backbone image 2000 ./fig_files/dump_stage_${ts}.*.jpg type type
dump_modify d0 adiam * 0.8

restart 50000 restart1 restart2
restart 1000000 archive_restart.*
run 1000000

write_restart run_prod.*
write_data run_prod.data
